// SBML level 3 version 2

model IVD_NP_RNM_enriched()
  // IVD NP Cell Signaling Regulatory Network Model (Enriched)
  // IVD NP Cell Signaling Regulatory Network Model
  // A Network-Based Approach to Understanding Key Signaling Pathways in Intervertebral Disc Biology.
  // Network: 85 proteins, 138 activation edges, 53 inhibition edges.
  // Mathematical framework: Semi-quantitative Mendoza ODE system (Mendoza & Xenarios, 2006). Each species rate rule encodes dx/dt = sigmoid(omega; h=10) - gamma*x, where omega aggregates all upstream activator and inhibitor inputs.
  // Parameters: h=10 (sigmoid steepness), gamma=1 (decay), alpha=beta=1 (uniform interaction weights).
  // model units - time: time_unit

  // Compartments:
  compartment cell = 1; cell is "NP Cell";

  // Species:
  species ACAN in cell = 1.739675e-5;
  species ADAMTS4_5 in cell = 0.09369875; ADAMTS4_5 is "ADAMTS4/5";
  species ALK6 in cell = 1.464384e-5;
  species AP_1 in cell = 0.9665476; AP_1 is "AP-1";
  species Act1 in cell = 1.236056e-43;
  species BMP in cell = 0.09369875;
  species BMPR in cell = 0.03701018;
  species CCL3 in cell = 0.09369875;
  species CCL3_4 in cell = 0.0007578266; CCL3_4 is "CCL3/4";
  species CCL4 in cell = 0.5209719;
  species CCN2 in cell = 2.249087e-43;
  species CGRP in cell = 0.9967431;
  species COL10A1 in cell = 1;
  species COL1A in cell = 1;
  species COL2A in cell = 4.681149e-5;
  species CREB in cell = 0.0616121;
  species CSF2 in cell = 0.9967431;
  species CXCR1 in cell = 0.01493634;
  species ERK in cell = 0.9789041;
  species FOXO in cell = 0.8704032;
  species GATA3 in cell = 0.00974514;
  species GDF5 in cell = 0.0001121271;
  species IFN_gamma in cell = 0.09369875; IFN_gamma is "IFN-γ";
  species IFN_gammaR in cell = 0.03701018; IFN_gammaR is "IFN-γR";
  species IGF1 in cell = 5.237941e-6;
  species IGF1R in cell = 7.912844e-45;
  species IL_10 in cell = 0.316935; IL_10 is "IL-10";
  species IL_10R in cell = 0.4685212; IL_10R is "IL-10R";
  species IL_10R1 in cell = 8.292461e-45; IL_10R1 is "IL-10R1";
  species IL_12 in cell = 0.9798513; IL_12 is "IL-12";
  species IL_12R in cell = 0.9993544; IL_12R is "IL-12R";
  species IL_17 in cell = 0.07405262; IL_17 is "IL-17";
  species IL_17RA in cell = 1.547875e-44; IL_17RA is "IL-17RA";
  species IL_18 in cell = 0.04567829; IL_18 is "IL-18";
  species IL_18RA in cell = 2.040207e-44; IL_18RA is "IL-18RA";
  species IL_1R1 in cell = 1.898461e-44; IL_1R1 is "IL-1R1";
  species IL_1Ra in cell = 0.04134417; IL_1Ra is "IL-1Ra";
  species IL_1beta in cell = 0.9235376; IL_1beta is "IL-1β";
  species IL_4 in cell = 0.001313684; IL_4 is "IL-4";
  species IL_4R in cell = 2.016925e-44; IL_4R is "IL-4R";
  species IL_6 in cell = 0.2327876; IL_6 is "IL-6";
  species IL_6R in cell = 2.463688e-44; IL_6R is "IL-6R";
  species IL_8 in cell = 0.07142947; IL_8 is "IL-8";
  species IkBa in cell = 0.7184533;
  species Ikk in cell = 0.2367809;
  species JAK in cell = 0.2721672;
  species JNK in cell = 0.7056141;
  species MMP1 in cell = 0.9998939;
  species MMP13 in cell = 0.8240588;
  species MMP2 in cell = 0.9998939;
  species MMP3 in cell = 0.866078;
  species MMP9 in cell = 0.2647683;
  species PGRN in cell = 2.230638e-44;
  species ROS in cell = 0.7095755;
  species RUNX2 in cell = 1;
  species SIRT1 in cell = 0.001490042;
  species SIRT2 in cell = 1.766332e-44;
  species SMAD1_5_8 in cell = 0.03052326; SMAD1_5_8 is "SMAD1/5/8";
  species SMAD2 in cell = 0.001022712;
  species SMAD2_3 in cell = 0.001022712; SMAD2_3 is "SMAD2/3";
  species SMAD3 in cell = 0.001022712;
  species SOCS_3 in cell = 0.1887537; SOCS_3 is "SOCS-3";
  species STAT1 in cell = 0.2059839;
  species STAT3 in cell = 0.3260603;
  species STAT6 in cell = 0.1157065;
  species Sox9 in cell = 0.02147302;
  species TGF_beta in cell = 0.0387699; TGF_beta is "TGF-β";
  species TGFBRI in cell = 0.007191862;
  species TIMP1_2 in cell = 9.357155e-5; TIMP1_2 is "TIMP1/2";
  species TIMP3 in cell = 0.1092369;
  species TLR in cell = 0.9588353;
  species TNF in cell = 0.4623348;
  species TNFR1 in cell = 1;
  species TRAF6 in cell = 0.2444885;
  species TSP_1 in cell = 9.357155e-5; TSP_1 is "TSP-1";
  species VEGF in cell = 0.4593727;
  species akt1 in cell = 0.0008104867;
  species c_Jun in cell = 0.7527215; c_Jun is "c-Jun";
  species caspase_1 in cell = 1.45482e-44; caspase_1 is "caspase-1";
  species iNos in cell = 0.2480206;
  species p38 in cell = 0.3700839;
  species p65 in cell = 0.1519462;
  species wnt3a in cell = 1;
  species wnt5a in cell = 0.09369875;
  species beta_catenin in cell = 1; beta_catenin is "β-catenin";

  // Parameters:
  h = 10; h is "Hill gain (sigmoid steepness)";
  gamma = 1; gamma is "Decay constant";

  // Rate rules:
  ACAN' = (-exp(0.5*h) + exp(-1*h*((2 + 1)/2*((SMAD2_3 + Sox9)/(1 + SMAD2_3 + Sox9))*(1 - (2 + 1)/2*((TLR + beta_catenin)/(1 + TLR + beta_catenin))) - 0.5)))/((1 - exp(0.5*h))*(1 + exp(-1*h*((2 + 1)/2*((SMAD2_3 + Sox9)/(1 + SMAD2_3 + Sox9))*(1 - (2 + 1)/2*((TLR + beta_catenin)/(1 + TLR + beta_catenin))) - 0.5)))) - gamma*ACAN;
  ADAMTS4_5' = (-exp(0.5*h) + exp(-1*h*((1 + 1)/1*(p65/(1 + p65)) - 0.5)))/((1 - exp(0.5*h))*(1 + exp(-1*h*((1 + 1)/1*(p65/(1 + p65)) - 0.5)))) - gamma*ADAMTS4_5;
  ALK6' = (-exp(0.5*h) + exp(-1*h*((1 + 1)/1*(GDF5/(1 + GDF5)) - 0.5)))/((1 - exp(0.5*h))*(1 + exp(-1*h*((1 + 1)/1*(GDF5/(1 + GDF5)) - 0.5)))) - gamma*ALK6;
  AP_1' = (-exp(0.5*h) + exp(-1*h*((3 + 1)/3*((JNK + c_Jun + p38)/(1 + JNK + c_Jun + p38))*(1 - (1 + 1)/1*(SIRT1/(1 + SIRT1))) - 0.5)))/((1 - exp(0.5*h))*(1 + exp(-1*h*((3 + 1)/3*((JNK + c_Jun + p38)/(1 + JNK + c_Jun + p38))*(1 - (1 + 1)/1*(SIRT1/(1 + SIRT1))) - 0.5)))) - gamma*AP_1;
  Act1' = (-exp(0.5*h) + exp(-1*h*((1 + 1)/1*(IL_17RA/(1 + IL_17RA)) - 0.5)))/((1 - exp(0.5*h))*(1 + exp(-1*h*((1 + 1)/1*(IL_17RA/(1 + IL_17RA)) - 0.5)))) - gamma*Act1;
  BMP' = (-exp(0.5*h) + exp(-1*h*((1 + 1)/1*(p65/(1 + p65)) - 0.5)))/((1 - exp(0.5*h))*(1 + exp(-1*h*((1 + 1)/1*(p65/(1 + p65)) - 0.5)))) - gamma*BMP;
  BMPR' = (-exp(0.5*h) + exp(-1*h*((1 + 1)/1*(BMP/(1 + BMP)) - 0.5)))/((1 - exp(0.5*h))*(1 + exp(-1*h*((1 + 1)/1*(BMP/(1 + BMP)) - 0.5)))) - gamma*BMPR;
  CCL3' = (-exp(0.5*h) + exp(-1*h*((1 + 1)/1*(p65/(1 + p65)) - 0.5)))/((1 - exp(0.5*h))*(1 + exp(-1*h*((1 + 1)/1*(p65/(1 + p65)) - 0.5)))) - gamma*CCL3;
  CCL3_4' = (-exp(0.5*h) + exp(-1*h*(1 - (1 + 1)/1*(ERK/(1 + ERK)) - 0.5)))/((1 - exp(0.5*h))*(1 + exp(-1*h*(1 - (1 + 1)/1*(ERK/(1 + ERK)) - 0.5)))) - gamma*CCL3_4;
  CCL4' = (-exp(0.5*h) + exp(-1*h*((1 + 1)/1*(p38/(1 + p38)) - 0.5)))/((1 - exp(0.5*h))*(1 + exp(-1*h*((1 + 1)/1*(p38/(1 + p38)) - 0.5)))) - gamma*CCL4;
  CCN2' = (-exp(0.5*h) + exp(-1*h*((3 + 1)/3*((AP_1 + SMAD3 + TGF_beta)/(1 + AP_1 + SMAD3 + TGF_beta))*(1 - (1 + 1)/1*(beta_catenin/(1 + beta_catenin))) - 0.5)))/((1 - exp(0.5*h))*(1 + exp(-1*h*((3 + 1)/3*((AP_1 + SMAD3 + TGF_beta)/(1 + AP_1 + SMAD3 + TGF_beta))*(1 - (1 + 1)/1*(beta_catenin/(1 + beta_catenin))) - 0.5)))) - gamma*CCN2;
  CGRP' = (-exp(0.5*h) + exp(-1*h*((1 + 1)/1*(IL_1beta/(1 + IL_1beta)) - 0.5)))/((1 - exp(0.5*h))*(1 + exp(-1*h*((1 + 1)/1*(IL_1beta/(1 + IL_1beta)) - 0.5)))) - gamma*CGRP;
  COL10A1' = (-exp(0.5*h) + exp(-1*h*((1 + 1)/1*(RUNX2/(1 + RUNX2)) - 0.5)))/((1 - exp(0.5*h))*(1 + exp(-1*h*((1 + 1)/1*(RUNX2/(1 + RUNX2)) - 0.5)))) - gamma*COL10A1;
  COL1A' = (-exp(0.5*h) + exp(-1*h*((1 + 1)/1*(RUNX2/(1 + RUNX2)) - 0.5)))/((1 - exp(0.5*h))*(1 + exp(-1*h*((1 + 1)/1*(RUNX2/(1 + RUNX2)) - 0.5)))) - gamma*COL1A;
  COL2A' = (-exp(0.5*h) + exp(-1*h*((3 + 1)/3*((SIRT2 + SMAD2_3 + Sox9)/(1 + SIRT2 + SMAD2_3 + Sox9))*(1 - (1 + 1)/1*(TLR/(1 + TLR))) - 0.5)))/((1 - exp(0.5*h))*(1 + exp(-1*h*((3 + 1)/3*((SIRT2 + SMAD2_3 + Sox9)/(1 + SIRT2 + SMAD2_3 + Sox9))*(1 - (1 + 1)/1*(TLR/(1 + TLR))) - 0.5)))) - gamma*COL2A;
  CREB' = (-exp(0.5*h) + exp(-1*h*((2 + 1)/2*((ERK + akt1)/(1 + ERK + akt1))*(1 - (2 + 1)/2*((JNK + p65)/(1 + JNK + p65))) - 0.5)))/((1 - exp(0.5*h))*(1 + exp(-1*h*((2 + 1)/2*((ERK + akt1)/(1 + ERK + akt1))*(1 - (2 + 1)/2*((JNK + p65)/(1 + JNK + p65))) - 0.5)))) - gamma*CREB;
  CSF2' = (-exp(0.5*h) + exp(-1*h*((1 + 1)/1*(IL_1beta/(1 + IL_1beta)) - 0.5)))/((1 - exp(0.5*h))*(1 + exp(-1*h*((1 + 1)/1*(IL_1beta/(1 + IL_1beta)) - 0.5)))) - gamma*CSF2;
  CXCR1' = (-exp(0.5*h) + exp(-1*h*((1 + 1)/1*(IL_8/(1 + IL_8)) - 0.5)))/((1 - exp(0.5*h))*(1 + exp(-1*h*((1 + 1)/1*(IL_8/(1 + IL_8)) - 0.5)))) - gamma*CXCR1;
  ERK' = (-exp(0.5*h) + exp(-1*h*((7 + 1)/7*((CGRP + IGF1R + IL_1R1 + SIRT2 + TGF_beta + TLR + TNFR1)/(1 + CGRP + IGF1R + IL_1R1 + SIRT2 + TGF_beta + TLR + TNFR1)) - 0.5)))/((1 - exp(0.5*h))*(1 + exp(-1*h*((7 + 1)/7*((CGRP + IGF1R + IL_1R1 + SIRT2 + TGF_beta + TLR + TNFR1)/(1 + CGRP + IGF1R + IL_1R1 + SIRT2 + TGF_beta + TLR + TNFR1)) - 0.5)))) - gamma*ERK;
  FOXO' = (-exp(0.5*h) + exp(-1*h*((2 + 1)/2*((JNK + p38)/(1 + JNK + p38))*(1 - (1 + 1)/1*(akt1/(1 + akt1))) - 0.5)))/((1 - exp(0.5*h))*(1 + exp(-1*h*((2 + 1)/2*((JNK + p38)/(1 + JNK + p38))*(1 - (1 + 1)/1*(akt1/(1 + akt1))) - 0.5)))) - gamma*FOXO;
  GATA3' = (-exp(0.5*h) + exp(-1*h*((1 + 1)/1*(STAT6/(1 + STAT6))*(1 - (1 + 1)/1*(STAT1/(1 + STAT1))) - 0.5)))/((1 - exp(0.5*h))*(1 + exp(-1*h*((1 + 1)/1*(STAT6/(1 + STAT6))*(1 - (1 + 1)/1*(STAT1/(1 + STAT1))) - 0.5)))) - gamma*GATA3;
  GDF5' = (-exp(0.5*h) + exp(-1*h*((1 + 1)/1*(Sox9/(1 + Sox9))*(1 - (1 + 1)/1*(IL_1beta/(1 + IL_1beta))) - 0.5)))/((1 - exp(0.5*h))*(1 + exp(-1*h*((1 + 1)/1*(Sox9/(1 + Sox9))*(1 - (1 + 1)/1*(IL_1beta/(1 + IL_1beta))) - 0.5)))) - gamma*GDF5;
  IFN_gamma' = (-exp(0.5*h) + exp(-1*h*((1 + 1)/1*(p65/(1 + p65)) - 0.5)))/((1 - exp(0.5*h))*(1 + exp(-1*h*((1 + 1)/1*(p65/(1 + p65)) - 0.5)))) - gamma*IFN_gamma;
  IFN_gammaR' = (-exp(0.5*h) + exp(-1*h*((1 + 1)/1*(IFN_gamma/(1 + IFN_gamma)) - 0.5)))/((1 - exp(0.5*h))*(1 + exp(-1*h*((1 + 1)/1*(IFN_gamma/(1 + IFN_gamma)) - 0.5)))) - gamma*IFN_gammaR;
  IGF1' = (-exp(0.5*h) + exp(-1*h*((1 + 1)/1*(SMAD2_3/(1 + SMAD2_3))*(1 - (1 + 1)/1*(IL_1beta/(1 + IL_1beta))) - 0.5)))/((1 - exp(0.5*h))*(1 + exp(-1*h*((1 + 1)/1*(SMAD2_3/(1 + SMAD2_3))*(1 - (1 + 1)/1*(IL_1beta/(1 + IL_1beta))) - 0.5)))) - gamma*IGF1;
  IGF1R' = (-exp(0.5*h) + exp(-1*h*(0 - 0.5)))/((1 - exp(0.5*h))*(1 + exp(-1*h*(0 - 0.5)))) - gamma*IGF1R;
  IL_10' = (-exp(0.5*h) + exp(-1*h*((2 + 1)/2*((CREB + STAT3)/(1 + CREB + STAT3)) - 0.5)))/((1 - exp(0.5*h))*(1 + exp(-1*h*((2 + 1)/2*((CREB + STAT3)/(1 + CREB + STAT3)) - 0.5)))) - gamma*IL_10;
  IL_10R' = (-exp(0.5*h) + exp(-1*h*((1 + 1)/1*(IL_10/(1 + IL_10)) - 0.5)))/((1 - exp(0.5*h))*(1 + exp(-1*h*((1 + 1)/1*(IL_10/(1 + IL_10)) - 0.5)))) - gamma*IL_10R;
  IL_10R1' = (-exp(0.5*h) + exp(-1*h*(0 - 0.5)))/((1 - exp(0.5*h))*(1 + exp(-1*h*(0 - 0.5)))) - gamma*IL_10R1;
  IL_12' = (-exp(0.5*h) + exp(-1*h*((1 + 1)/1*(c_Jun/(1 + c_Jun)) - 0.5)))/((1 - exp(0.5*h))*(1 + exp(-1*h*((1 + 1)/1*(c_Jun/(1 + c_Jun)) - 0.5)))) - gamma*IL_12;
  IL_12R' = (-exp(0.5*h) + exp(-1*h*((1 + 1)/1*(IL_12/(1 + IL_12)) - 0.5)))/((1 - exp(0.5*h))*(1 + exp(-1*h*((1 + 1)/1*(IL_12/(1 + IL_12)) - 0.5)))) - gamma*IL_12R;
  IL_17' = (-exp(0.5*h) + exp(-1*h*((2 + 1)/2*((IL_6 + TNF)/(1 + IL_6 + TNF))*(1 - (1 + 1)/1*(IL_10/(1 + IL_10))) - 0.5)))/((1 - exp(0.5*h))*(1 + exp(-1*h*((2 + 1)/2*((IL_6 + TNF)/(1 + IL_6 + TNF))*(1 - (1 + 1)/1*(IL_10/(1 + IL_10))) - 0.5)))) - gamma*IL_17;
  IL_17RA' = (-exp(0.5*h) + exp(-1*h*(0 - 0.5)))/((1 - exp(0.5*h))*(1 + exp(-1*h*(0 - 0.5)))) - gamma*IL_17RA;
  IL_18' = (-exp(0.5*h) + exp(-1*h*((2 + 1)/2*((caspase_1 + p65)/(1 + caspase_1 + p65)) - 0.5)))/((1 - exp(0.5*h))*(1 + exp(-1*h*((2 + 1)/2*((caspase_1 + p65)/(1 + caspase_1 + p65)) - 0.5)))) - gamma*IL_18;
  IL_18RA' = (-exp(0.5*h) + exp(-1*h*(0 - 0.5)))/((1 - exp(0.5*h))*(1 + exp(-1*h*(0 - 0.5)))) - gamma*IL_18RA;
  IL_1R1' = (-exp(0.5*h) + exp(-1*h*(0 - 0.5)))/((1 - exp(0.5*h))*(1 + exp(-1*h*(0 - 0.5)))) - gamma*IL_1R1;
  IL_1Ra' = (-exp(0.5*h) + exp(-1*h*((1 + 1)/1*(STAT6/(1 + STAT6)) - 0.5)))/((1 - exp(0.5*h))*(1 + exp(-1*h*((1 + 1)/1*(STAT6/(1 + STAT6)) - 0.5)))) - gamma*IL_1Ra;
  IL_1beta' = (-exp(0.5*h) + exp(-1*h*((2 + 1)/2*((AP_1 + p65)/(1 + AP_1 + p65))*(1 - (2 + 1)/2*((IL_1Ra + SIRT1)/(1 + IL_1Ra + SIRT1))) - 0.5)))/((1 - exp(0.5*h))*(1 + exp(-1*h*((2 + 1)/2*((AP_1 + p65)/(1 + AP_1 + p65))*(1 - (2 + 1)/2*((IL_1Ra + SIRT1)/(1 + IL_1Ra + SIRT1))) - 0.5)))) - gamma*IL_1beta;
  IL_4' = (-exp(0.5*h) + exp(-1*h*((1 + 1)/1*(GATA3/(1 + GATA3)) - 0.5)))/((1 - exp(0.5*h))*(1 + exp(-1*h*((1 + 1)/1*(GATA3/(1 + GATA3)) - 0.5)))) - gamma*IL_4;
  IL_4R' = (-exp(0.5*h) + exp(-1*h*(0 - 0.5)))/((1 - exp(0.5*h))*(1 + exp(-1*h*(0 - 0.5)))) - gamma*IL_4R;
  IL_6' = (-exp(0.5*h) + exp(-1*h*((2 + 1)/2*((AP_1 + p65)/(1 + AP_1 + p65))*(1 - (1 + 1)/1*(STAT3/(1 + STAT3))) - 0.5)))/((1 - exp(0.5*h))*(1 + exp(-1*h*((2 + 1)/2*((AP_1 + p65)/(1 + AP_1 + p65))*(1 - (1 + 1)/1*(STAT3/(1 + STAT3))) - 0.5)))) - gamma*IL_6;
  IL_6R' = (-exp(0.5*h) + exp(-1*h*(0 - 0.5)))/((1 - exp(0.5*h))*(1 + exp(-1*h*(0 - 0.5)))) - gamma*IL_6R;
  IL_8' = (-exp(0.5*h) + exp(-1*h*((2 + 1)/2*((p38 + p65)/(1 + p38 + p65))*(1 - (1 + 1)/1*(STAT3/(1 + STAT3))) - 0.5)))/((1 - exp(0.5*h))*(1 + exp(-1*h*((2 + 1)/2*((p38 + p65)/(1 + p38 + p65))*(1 - (1 + 1)/1*(STAT3/(1 + STAT3))) - 0.5)))) - gamma*IL_8;
  IkBa' = (-exp(0.5*h) + exp(-1*h*(1 - (1 + 1)/1*(Ikk/(1 + Ikk)) - 0.5)))/((1 - exp(0.5*h))*(1 + exp(-1*h*(1 - (1 + 1)/1*(Ikk/(1 + Ikk)) - 0.5)))) - gamma*IkBa;
  Ikk' = (-exp(0.5*h) + exp(-1*h*((1 + 1)/1*(TRAF6/(1 + TRAF6)) - 0.5)))/((1 - exp(0.5*h))*(1 + exp(-1*h*((1 + 1)/1*(TRAF6/(1 + TRAF6)) - 0.5)))) - gamma*Ikk;
  JAK' = (-exp(0.5*h) + exp(-1*h*((5 + 1)/5*((IFN_gammaR + IL_10R1 + IL_12R + IL_4R + IL_6R)/(1 + IFN_gammaR + IL_10R1 + IL_12R + IL_4R + IL_6R))*(1 - (1 + 1)/1*(SOCS_3/(1 + SOCS_3))) - 0.5)))/((1 - exp(0.5*h))*(1 + exp(-1*h*((5 + 1)/5*((IFN_gammaR + IL_10R1 + IL_12R + IL_4R + IL_6R)/(1 + IFN_gammaR + IL_10R1 + IL_12R + IL_4R + IL_6R))*(1 - (1 + 1)/1*(SOCS_3/(1 + SOCS_3))) - 0.5)))) - gamma*JAK;
  JNK' = (-exp(0.5*h) + exp(-1*h*((6 + 1)/6*((CGRP + IL_17RA + TLR + TNFR1 + TRAF6 + wnt5a)/(1 + CGRP + IL_17RA + TLR + TNFR1 + TRAF6 + wnt5a))*(1 - (1 + 1)/1*(SOCS_3/(1 + SOCS_3))) - 0.5)))/((1 - exp(0.5*h))*(1 + exp(-1*h*((6 + 1)/6*((CGRP + IL_17RA + TLR + TNFR1 + TRAF6 + wnt5a)/(1 + CGRP + IL_17RA + TLR + TNFR1 + TRAF6 + wnt5a))*(1 - (1 + 1)/1*(SOCS_3/(1 + SOCS_3))) - 0.5)))) - gamma*JNK;
  MMP1' = (-exp(0.5*h) + exp(-1*h*((1 + 1)/1*(beta_catenin/(1 + beta_catenin))*(1 - (1 + 1)/1*(akt1/(1 + akt1))) - 0.5)))/((1 - exp(0.5*h))*(1 + exp(-1*h*((1 + 1)/1*(beta_catenin/(1 + beta_catenin))*(1 - (1 + 1)/1*(akt1/(1 + akt1))) - 0.5)))) - gamma*MMP1;
  MMP13' = (-exp(0.5*h) + exp(-1*h*((2 + 1)/2*((p65 + beta_catenin)/(1 + p65 + beta_catenin))*(1 - (2 + 1)/2*((akt1 + wnt5a)/(1 + akt1 + wnt5a))) - 0.5)))/((1 - exp(0.5*h))*(1 + exp(-1*h*((2 + 1)/2*((p65 + beta_catenin)/(1 + p65 + beta_catenin))*(1 - (2 + 1)/2*((akt1 + wnt5a)/(1 + akt1 + wnt5a))) - 0.5)))) - gamma*MMP13;
  MMP2' = (-exp(0.5*h) + exp(-1*h*((1 + 1)/1*(beta_catenin/(1 + beta_catenin))*(1 - (1 + 1)/1*(akt1/(1 + akt1))) - 0.5)))/((1 - exp(0.5*h))*(1 + exp(-1*h*((1 + 1)/1*(beta_catenin/(1 + beta_catenin))*(1 - (1 + 1)/1*(akt1/(1 + akt1))) - 0.5)))) - gamma*MMP2;
  MMP3' = (-exp(0.5*h) + exp(-1*h*((4 + 1)/4*((c_Jun + p38 + p65 + beta_catenin)/(1 + c_Jun + p38 + p65 + beta_catenin))*(1 - (2 + 1)/2*((akt1 + wnt5a)/(1 + akt1 + wnt5a))) - 0.5)))/((1 - exp(0.5*h))*(1 + exp(-1*h*((4 + 1)/4*((c_Jun + p38 + p65 + beta_catenin)/(1 + c_Jun + p38 + p65 + beta_catenin))*(1 - (2 + 1)/2*((akt1 + wnt5a)/(1 + akt1 + wnt5a))) - 0.5)))) - gamma*MMP3;
  MMP9' = (-exp(0.5*h) + exp(-1*h*((2 + 1)/2*((p65 + beta_catenin)/(1 + p65 + beta_catenin))*(1 - (1 + 1)/1*(STAT3/(1 + STAT3))) - 0.5)))/((1 - exp(0.5*h))*(1 + exp(-1*h*((2 + 1)/2*((p65 + beta_catenin)/(1 + p65 + beta_catenin))*(1 - (1 + 1)/1*(STAT3/(1 + STAT3))) - 0.5)))) - gamma*MMP9;
  PGRN' = (-exp(0.5*h) + exp(-1*h*(0 - 0.5)))/((1 - exp(0.5*h))*(1 + exp(-1*h*(0 - 0.5)))) - gamma*PGRN;
  ROS' = (-exp(0.5*h) + exp(-1*h*((1 + 1)/1*(TNF/(1 + TNF))*(1 - (2 + 1)/2*((SIRT2 + akt1)/(1 + SIRT2 + akt1))) - 0.5)))/((1 - exp(0.5*h))*(1 + exp(-1*h*((1 + 1)/1*(TNF/(1 + TNF))*(1 - (2 + 1)/2*((SIRT2 + akt1)/(1 + SIRT2 + akt1))) - 0.5)))) - gamma*ROS;
  RUNX2' = (-exp(0.5*h) + exp(-1*h*((1 + 1)/1*(wnt3a/(1 + wnt3a)) - 0.5)))/((1 - exp(0.5*h))*(1 + exp(-1*h*((1 + 1)/1*(wnt3a/(1 + wnt3a)) - 0.5)))) - gamma*RUNX2;
  SIRT1' = (-exp(0.5*h) + exp(-1*h*((1 + 1)/1*(FOXO/(1 + FOXO))*(1 - (1 + 1)/1*(TLR/(1 + TLR))) - 0.5)))/((1 - exp(0.5*h))*(1 + exp(-1*h*((1 + 1)/1*(FOXO/(1 + FOXO))*(1 - (1 + 1)/1*(TLR/(1 + TLR))) - 0.5)))) - gamma*SIRT1;
  SIRT2' = (-exp(0.5*h) + exp(-1*h*(0 - 0.5)))/((1 - exp(0.5*h))*(1 + exp(-1*h*(0 - 0.5)))) - gamma*SIRT2;
  SMAD1_5_8' = (-exp(0.5*h) + exp(-1*h*((2 + 1)/2*((ALK6 + BMPR)/(1 + ALK6 + BMPR)) - 0.5)))/((1 - exp(0.5*h))*(1 + exp(-1*h*((2 + 1)/2*((ALK6 + BMPR)/(1 + ALK6 + BMPR)) - 0.5)))) - gamma*SMAD1_5_8;
  SMAD2' = (-exp(0.5*h) + exp(-1*h*((1 + 1)/1*(TGFBRI/(1 + TGFBRI)) - 0.5)))/((1 - exp(0.5*h))*(1 + exp(-1*h*((1 + 1)/1*(TGFBRI/(1 + TGFBRI)) - 0.5)))) - gamma*SMAD2;
  SMAD2_3' = (-exp(0.5*h) + exp(-1*h*((1 + 1)/1*(TGFBRI/(1 + TGFBRI)) - 0.5)))/((1 - exp(0.5*h))*(1 + exp(-1*h*((1 + 1)/1*(TGFBRI/(1 + TGFBRI)) - 0.5)))) - gamma*SMAD2_3;
  SMAD3' = (-exp(0.5*h) + exp(-1*h*((1 + 1)/1*(TGFBRI/(1 + TGFBRI)) - 0.5)))/((1 - exp(0.5*h))*(1 + exp(-1*h*((1 + 1)/1*(TGFBRI/(1 + TGFBRI)) - 0.5)))) - gamma*SMAD3;
  SOCS_3' = (-exp(0.5*h) + exp(-1*h*((1 + 1)/1*(STAT3/(1 + STAT3))*(1 - (1 + 1)/1*(p65/(1 + p65))) - 0.5)))/((1 - exp(0.5*h))*(1 + exp(-1*h*((1 + 1)/1*(STAT3/(1 + STAT3))*(1 - (1 + 1)/1*(p65/(1 + p65))) - 0.5)))) - gamma*SOCS_3;
  STAT1' = (-exp(0.5*h) + exp(-1*h*((2 + 1)/2*((IFN_gammaR + JAK)/(1 + IFN_gammaR + JAK)) - 0.5)))/((1 - exp(0.5*h))*(1 + exp(-1*h*((2 + 1)/2*((IFN_gammaR + JAK)/(1 + IFN_gammaR + JAK)) - 0.5)))) - gamma*STAT1;
  STAT3' = (-exp(0.5*h) + exp(-1*h*((1 + 1)/1*(JAK/(1 + JAK))*(1 - (1 + 1)/1*(IL_1R1/(1 + IL_1R1))) - 0.5)))/((1 - exp(0.5*h))*(1 + exp(-1*h*((1 + 1)/1*(JAK/(1 + JAK))*(1 - (1 + 1)/1*(IL_1R1/(1 + IL_1R1))) - 0.5)))) - gamma*STAT3;
  STAT6' = (-exp(0.5*h) + exp(-1*h*((1 + 1)/1*(JAK/(1 + JAK))*(1 - (1 + 1)/1*(p65/(1 + p65))) - 0.5)))/((1 - exp(0.5*h))*(1 + exp(-1*h*((1 + 1)/1*(JAK/(1 + JAK))*(1 - (1 + 1)/1*(p65/(1 + p65))) - 0.5)))) - gamma*STAT6;
  Sox9' = (-exp(0.5*h) + exp(-1*h*((4 + 1)/4*((SMAD1_5_8 + TGFBRI + akt1 + wnt5a)/(1 + SMAD1_5_8 + TGFBRI + akt1 + wnt5a))*(1 - (1 + 1)/1*(p65/(1 + p65))) - 0.5)))/((1 - exp(0.5*h))*(1 + exp(-1*h*((4 + 1)/4*((SMAD1_5_8 + TGFBRI + akt1 + wnt5a)/(1 + SMAD1_5_8 + TGFBRI + akt1 + wnt5a))*(1 - (1 + 1)/1*(p65/(1 + p65))) - 0.5)))) - gamma*Sox9;
  TGF_beta' = (-exp(0.5*h) + exp(-1*h*(1 - (2 + 1)/2*((p65 + wnt3a)/(1 + p65 + wnt3a)) - 0.5)))/((1 - exp(0.5*h))*(1 + exp(-1*h*(1 - (2 + 1)/2*((p65 + wnt3a)/(1 + p65 + wnt3a)) - 0.5)))) - gamma*TGF_beta;
  TGFBRI' = (-exp(0.5*h) + exp(-1*h*((1 + 1)/1*(TGF_beta/(1 + TGF_beta)) - 0.5)))/((1 - exp(0.5*h))*(1 + exp(-1*h*((1 + 1)/1*(TGF_beta/(1 + TGF_beta)) - 0.5)))) - gamma*TGFBRI;
  TIMP1_2' = (-exp(0.5*h) + exp(-1*h*((1 + 1)/1*(SMAD2_3/(1 + SMAD2_3))*(1 - (1 + 1)/1*(p65/(1 + p65))) - 0.5)))/((1 - exp(0.5*h))*(1 + exp(-1*h*((1 + 1)/1*(SMAD2_3/(1 + SMAD2_3))*(1 - (1 + 1)/1*(p65/(1 + p65))) - 0.5)))) - gamma*TIMP1_2;
  TIMP3' = (-exp(0.5*h) + exp(-1*h*((3 + 1)/3*((SMAD3 + STAT3 + STAT6)/(1 + SMAD3 + STAT3 + STAT6))*(1 - (1 + 1)/1*(p65/(1 + p65))) - 0.5)))/((1 - exp(0.5*h))*(1 + exp(-1*h*((3 + 1)/3*((SMAD3 + STAT3 + STAT6)/(1 + SMAD3 + STAT3 + STAT6))*(1 - (1 + 1)/1*(p65/(1 + p65))) - 0.5)))) - gamma*TIMP3;
  TLR' = (-exp(0.5*h) + exp(-1*h*((3 + 1)/3*((IFN_gamma + IL_1beta + TNF)/(1 + IFN_gamma + IL_1beta + TNF)) - 0.5)))/((1 - exp(0.5*h))*(1 + exp(-1*h*((3 + 1)/3*((IFN_gamma + IL_1beta + TNF)/(1 + IFN_gamma + IL_1beta + TNF)) - 0.5)))) - gamma*TLR;
  TNF' = (-exp(0.5*h) + exp(-1*h*((2 + 1)/2*((AP_1 + p65)/(1 + AP_1 + p65))*(1 - (2 + 1)/2*((STAT3 + akt1)/(1 + STAT3 + akt1))) - 0.5)))/((1 - exp(0.5*h))*(1 + exp(-1*h*((2 + 1)/2*((AP_1 + p65)/(1 + AP_1 + p65))*(1 - (2 + 1)/2*((STAT3 + akt1)/(1 + STAT3 + akt1))) - 0.5)))) - gamma*TNF;
  TNFR1' = (-exp(0.5*h) + exp(-1*h*(1 - (1 + 1)/1*(PGRN/(1 + PGRN)) - 0.5)))/((1 - exp(0.5*h))*(1 + exp(-1*h*(1 - (1 + 1)/1*(PGRN/(1 + PGRN)) - 0.5)))) - gamma*TNFR1;
  TRAF6' = (-exp(0.5*h) + exp(-1*h*((4 + 1)/4*((Act1 + IL_18RA + IL_1R1 + TLR)/(1 + Act1 + IL_18RA + IL_1R1 + TLR))*(1 - (1 + 1)/1*(SOCS_3/(1 + SOCS_3))) - 0.5)))/((1 - exp(0.5*h))*(1 + exp(-1*h*((4 + 1)/4*((Act1 + IL_18RA + IL_1R1 + TLR)/(1 + Act1 + IL_18RA + IL_1R1 + TLR))*(1 - (1 + 1)/1*(SOCS_3/(1 + SOCS_3))) - 0.5)))) - gamma*TRAF6;
  TSP_1' = (-exp(0.5*h) + exp(-1*h*((1 + 1)/1*(SMAD2/(1 + SMAD2))*(1 - (1 + 1)/1*(p65/(1 + p65))) - 0.5)))/((1 - exp(0.5*h))*(1 + exp(-1*h*((1 + 1)/1*(SMAD2/(1 + SMAD2))*(1 - (1 + 1)/1*(p65/(1 + p65))) - 0.5)))) - gamma*TSP_1;
  VEGF' = (-exp(0.5*h) + exp(-1*h*((3 + 1)/3*((SMAD3 + STAT1 + STAT3)/(1 + SMAD3 + STAT1 + STAT3))*(1 - (1 + 1)/1*(TSP_1/(1 + TSP_1))) - 0.5)))/((1 - exp(0.5*h))*(1 + exp(-1*h*((3 + 1)/3*((SMAD3 + STAT1 + STAT3)/(1 + SMAD3 + STAT1 + STAT3))*(1 - (1 + 1)/1*(TSP_1/(1 + TSP_1))) - 0.5)))) - gamma*VEGF;
  akt1' = (-exp(0.5*h) + exp(-1*h*((3 + 1)/3*((IGF1R + SIRT1 + TGFBRI)/(1 + IGF1R + SIRT1 + TGFBRI))*(1 - (1 + 1)/1*(IL_1R1/(1 + IL_1R1))) - 0.5)))/((1 - exp(0.5*h))*(1 + exp(-1*h*((3 + 1)/3*((IGF1R + SIRT1 + TGFBRI)/(1 + IGF1R + SIRT1 + TGFBRI))*(1 - (1 + 1)/1*(IL_1R1/(1 + IL_1R1))) - 0.5)))) - gamma*akt1;
  c_Jun' = (-exp(0.5*h) + exp(-1*h*((3 + 1)/3*((IL_1R1 + JNK + p38)/(1 + IL_1R1 + JNK + p38))*(1 - (1 + 1)/1*(SIRT1/(1 + SIRT1))) - 0.5)))/((1 - exp(0.5*h))*(1 + exp(-1*h*((3 + 1)/3*((IL_1R1 + JNK + p38)/(1 + IL_1R1 + JNK + p38))*(1 - (1 + 1)/1*(SIRT1/(1 + SIRT1))) - 0.5)))) - gamma*c_Jun;
  caspase_1' = (-exp(0.5*h) + exp(-1*h*(0 - 0.5)))/((1 - exp(0.5*h))*(1 + exp(-1*h*(0 - 0.5)))) - gamma*caspase_1;
  iNos' = (-exp(0.5*h) + exp(-1*h*((2 + 1)/2*((STAT1 + p65)/(1 + STAT1 + p65))*(1 - (1 + 1)/1*(IL_1Ra/(1 + IL_1Ra))) - 0.5)))/((1 - exp(0.5*h))*(1 + exp(-1*h*((2 + 1)/2*((STAT1 + p65)/(1 + STAT1 + p65))*(1 - (1 + 1)/1*(IL_1Ra/(1 + IL_1Ra))) - 0.5)))) - gamma*iNos;
  p38' = (-exp(0.5*h) + exp(-1*h*((7 + 1)/7*((CGRP + IL_17RA + IL_1R1 + IL_6R + TLR + TNFR1 + TRAF6)/(1 + CGRP + IL_17RA + IL_1R1 + IL_6R + TLR + TNFR1 + TRAF6))*(1 - (1 + 1)/1*(IL_10/(1 + IL_10))) - 0.5)))/((1 - exp(0.5*h))*(1 + exp(-1*h*((7 + 1)/7*((CGRP + IL_17RA + IL_1R1 + IL_6R + TLR + TNFR1 + TRAF6)/(1 + CGRP + IL_17RA + IL_1R1 + IL_6R + TLR + TNFR1 + TRAF6))*(1 - (1 + 1)/1*(IL_10/(1 + IL_10))) - 0.5)))) - gamma*p38;
  p65' = (-exp(0.5*h) + exp(-1*h*((7 + 1)/7*((CGRP + IL_17RA + IL_1R1 + Ikk + TLR + TNFR1 + p65)/(1 + CGRP + IL_17RA + IL_1R1 + Ikk + TLR + TNFR1 + p65))*(1 - (5 + 1)/5*((BMPR + IkBa + SIRT1 + SOCS_3 + wnt5a)/(1 + BMPR + IkBa + SIRT1 + SOCS_3 + wnt5a))) - 0.5)))/((1 - exp(0.5*h))*(1 + exp(-1*h*((7 + 1)/7*((CGRP + IL_17RA + IL_1R1 + Ikk + TLR + TNFR1 + p65)/(1 + CGRP + IL_17RA + IL_1R1 + Ikk + TLR + TNFR1 + p65))*(1 - (5 + 1)/5*((BMPR + IkBa + SIRT1 + SOCS_3 + wnt5a)/(1 + BMPR + IkBa + SIRT1 + SOCS_3 + wnt5a))) - 0.5)))) - gamma*p65;
  wnt3a' = (-exp(0.5*h) + exp(-1*h*((1 + 1)/1*(TNFR1/(1 + TNFR1)) - 0.5)))/((1 - exp(0.5*h))*(1 + exp(-1*h*((1 + 1)/1*(TNFR1/(1 + TNFR1)) - 0.5)))) - gamma*wnt3a;
  wnt5a' = (-exp(0.5*h) + exp(-1*h*((1 + 1)/1*(p65/(1 + p65)) - 0.5)))/((1 - exp(0.5*h))*(1 + exp(-1*h*((1 + 1)/1*(p65/(1 + p65)) - 0.5)))) - gamma*wnt5a;
  beta_catenin' = (-exp(0.5*h) + exp(-1*h*((1 + 1)/1*(wnt3a/(1 + wnt3a)) - 0.5)))/((1 - exp(0.5*h))*(1 + exp(-1*h*((1 + 1)/1*(wnt3a/(1 + wnt3a)) - 0.5)))) - gamma*beta_catenin;

  // Unit definitions:
  unit time_unit = second;
  unit arbitrary_units = dimensionless;
end
